*Heading
** Job name: VUMATMODEL Model name: vumatmodel
** Generated by: Abaqus/CAE 2024
*Preprint, echo=NO, model=NO, history=NO, contact=NO
**
** PARTS
**
*Part, name=BEAM
*Node
      1,          50.,          50.,         600.
      2,          50.,          40.,         600.
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*Element, type=C3D8
   1,  367,  368,  374,  373,    1,    2,    8,    7
   2,  368,  369,  375,  374,    2,    3,    9,    8
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*Nset, nset=SET-1, generate
    1,  2196,     1
*Elset, elset=SET-1, generate
    1,  1500,     1
** Section: Section-1-SET-1
*Solid Section, elset=SET-1, material=STEEL
,
*End Part
**
**
** ASSEMBLY
**
*Assembly, name=Assembly
**
*Instance, name=BEAM-1, part=BEAM
*End Instance
**
*Nset, nset=SET-1, instance=BEAM-1
  361,  362,  363,  364,  365,  366
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*Elset, elset=SET-1, instance=BEAM-1
  296,  297,  298,  299,  300,  596
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*Nset, nset=SET-2, instance=BEAM-1
    1,    2,    3,    4,    5,    6
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*Elset, elset=SET-2, instance=BEAM-1
    1,    2,    3,    4,    5,  301
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*End Assembly
*Amplitude, name=Amp-1, definition=SMOOTH STEP
             0.,              0.,            200.,              1.
**
** MATERIALS
**
*Material, name=STEEL
*Density
7800.,
*User Material, constants=2
210000., 0.3
** ----------------------------------------------------------------
**
** STEP: Step-1
**
*Step, name=Step-1, nlgeom=YES
*Dynamic, Explicit
, 200.
*Bulk Viscosity
0.06, 1.2
**
** BOUNDARY CONDITIONS
**
** Name: Disp-BC-1 Type: Displacement/Rotation
*Boundary
SET-1, 1, 1
** Name: Disp-BC-2 Type: Displacement/Rotation
*Boundary
SET-1, 2, 2
** Name: Disp-BC-3 Type: Displacement/Rotation
*Boundary
SET-1, 3, 3
** Name: Disp-BC-4 Type: Displacement/Rotation
*Boundary
SET-1, 4, 4
** Name: Disp-BC-5 Type: Displacement/Rotation
*Boundary
SET-1, 5, 5
** Name: Disp-BC-6 Type: Displacement/Rotation
*Boundary
SET-1, 6, 6
** Name: Disp-BC-7 Type: Displacement/Rotation
*Boundary, amplitude=Amp-1
SET-2, 3, 3, 5.
**
** OUTPUT REQUESTS
**
*Restart, write, number interval=1, time marks=NO
**
** FIELD OUTPUT: F-Output-1
**
*Output, field, variable=PRESELECT
**
** HISTORY OUTPUT: H-Output-1
**
*Output, history, variable=PRESELECT, frequency=1
*End Step
